Альфа - распределение
# 1. Функция плотности альфа-распределения
x := 0, 0.1 .. 20
f(x, v, q) := x/q^2*exp(-(x^2 + v^2)/(2*q^2))*I0(x*v/q^2)
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# 2. Функция распределения
s(a, b) := 1/π*integral((a*b*cos(x) + b^2)/(a^2 + 2*a*b*cos(x) + b^2)*e^(-(a^2 + 2*a*b*cos(x) + b^2)/2), x = 0 .. π)
Q(a, b) :=
    1 + s(a, b) if a > b
    0.5 + s(a, b) if a == b
    s(a, b) if a < b
Rice(x, v, q) := 1 - Q(v/q, x/q)
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# 3. Начальные моменты.
a1(a, b) := integral(x*f(x, a, b), x = 0 .. 10)
a2(a, b) := integral(x^2*f(x, a, b), x = 0 .. 10)
a3(a, b) := integral(x^3*f(x, a, b), x = 0 .. 10)
L(x) := 1/(1/2)!*(d/dx(-1))^(1/2)*x^(1/2)
# 4. Математическое ожидание.
M1(a, b) := a1(a, b)
M1(4, 10) = 2.35176
M2(v, q) := q*sqrt(π/2)*Lag(1/2, -v^2/(2*q^2))
M2(10, 1) =  # error: This value must be a nonnegative integer.
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c1 := 1, 1.1 .. 20
# 5. Мода
a := 4
b := 20
mo(x, a, b) := root(d/dX(f(X, a, b)), X, 4, 20)
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mo(0, 4, 20) =  # error: The function values on the end points must be of opposite signs.
# 6. Медиана
root(Q(x, 4, 20) - 1/2, x, 4, 20) =  # error: This function accepts at most 2 arguments but is applied to 3.
# 7. Дисперсия
D1(a, b) := a2(a, b) - a1(a, b)^2
D1(4, 20) = 5.07158
D2(a, b) := b^2/a^4*(1 + 8/a^2)
D2(4, 20) = 2.34375
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c2 := 2, 2.1 .. 5
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sigma(4, 20) =  # error: This variable is undefined.
# 8. Среднеквадратичное отклонение
sigma(a, b) := sqrt(D1(a, b))
# 9. Коэффициент асимметрии
mu(a, b) := 2*a1(a, b)^3 - 3*a1(a, b)*a2(a, b) + a3(a, b)
S1(a, b) := mu(a, b)/sigma(a, b)^3
c2 := 2, 2.1 .. 5
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