# Функция распределения
s(a, b) := 1/π*integral((a*b*cos(x) + b^2)/(a^2 + 2*a*b*cos(x) + b^2)*e^(-(a^2 + 2*a*b*cos(x) + b^2)/2), x = 0 .. π)
Q(a, b) :=
    1 + s(a, b) if a > b
    0.5 + s(a, b) if a == b
    s(a, b) if a < b
fr(x, ν, σ) := 1 - Q(ν/σ, x/σ)
obr1(y, ν, σ) := root(fr(t, ν, σ) - y, t, 0, 10)
obr2(y, t) := root(fr(t, 1, 2) - y, t)
obr3(y, t) := root(fr(t, 1, 4) - y, t)
N0 := 10000
a := 0
b := 1
Y := sort(runif(N0, a, b))
X2 :=
    for i ∈ 0 .. N0 - 1
        x[i] ← obr2(Y[i], 1)
    return x
X3 :=
    for i ∈ 0 .. N0 - 1
        x[i] ← obr3(Y[i], 1)
    return x
X1 :=
    for i ∈ 0 .. N0 - 1
        x[i] ← obr1(Y[i], 5, 1)
    return x
X2 := sort(X2)
X3 := sort(X3)
X1 := sort(X1)
N2(t) :=
    i ← 0
    while t > X2[i]
        i ← i + 1
    N0 - i
N3(t) :=
    i ← 0
    while t > X3[i]
        i ← i + 1
    N0 - i
N1(t) :=
    i ← 0
    while t > X1[i]
        i ← i + 1
    N0 - i
h := 0.5
h := 0.05
h := 0.05
T2max := round(max(X2)/h, 0)
T3max := round(max(X3)/h, 0)
T1max := round(max(X1)/h, 0)
i2 := 0 .. T2max
i3 := 0 .. T3max
i1 := 0 .. T1max
T2[i2] := i2*h
T3[i3] := i3*h
T1[i1] := i1*h
i2 := 0 .. T2max - 1
i3 := 0 .. T3max - 1
i1 := 0 .. T1max - 1
P2[i2] := N2(T2[i2])/N0
P3[i3] := N3(T3[i3])/N0
P1[i1] := N1(T1[i1])/N0
P2[T2max] := 0
P3[T3max] := 0
P1[T1max] := 0
P(t, ν, σ) := 1 - fr(t, ν, σ)
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Q1[i1] := (N0 - N1(T1[i1]))/N0
Q2[i2] := (N0 - N2(T2[i2]))/N0
Q3[i3] := (N0 - N3(T3[i3]))/N0
Q(t, ν, σ) := 1 - P(t, ν, σ)
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i3 := 0 .. T3max - 2
i1 := 0 .. T1max - 2
i2 := 0 .. T2max - 2
f3[i3] := (N3(T3[i3]) - N3(T3[i3] + h))/(N0*h)
f1[i1] := (N1(T1[i1]) - N1(T1[i1] + h))/(N0*h)
f2[i2] := (N2(T2[i2]) - N2(T2[i2] + h))/(N0*h)
f(x, ν, σ) := x/σ^2*exp(-(x^2 + ν^2)/(2*σ^2))*In(0, x*ν/σ^2)
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i1 := 0 .. T1max - 2
i2 := 0 .. T2max - 2
i3 := 0 .. T3max - 2
λ1[i1] := (N1(T1[i1]) - N1(T1[i1] + h))/(N1(T1[i1])*h)
λ2[i2] := (N2(T2[i2]) - N2(T2[i2] + h))/(N2(T2[i2])*h)
λ3[i3] := (N3(T3[i3]) - N3(T3[i3] + h))/(N3(T3[i3])*h)
λ(t, ν, σ) := f(t, ν, σ)/P(t, ν, σ)
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