# Распределение Райса
x := 0, 0.01 .. 20
# Функция плотности распределения | Функция распределения
f(x, ν, σ) := x/σ^2*exp(-(x^2 + ν^2)/(2*σ^2))*In(0, x*ν/σ^2)
s(a, b) := 1/π*integral((a*b*cos(x) + b^2)/(a^2 + 2*a*b*cos(x) + b^2)*e^(-(a^2 + 2*a*b*cos(x) + b^2)/2), x = 0 .. π)
Q(a, b) :=
    1 + s(a, b) if a > b
    0.5 + s(a, b) if a == b
    s(a, b) if a < b
fr(x, ν, σ) := 1 - Q(ν/σ, x/σ)
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M1 := integral(x*f(x, 5, 1), x = 0 .. 10) = 5.10107
D1 := integral(x^2*f(x, 5, 1), x = 0 .. 10) - integral(x*f(x, 5, 1), x = 0 .. 10)^2 = 0.979089
n := 10000
i := 1 .. n
a1 := 0
a2 := 1
Y := runif(n, a1, a2)
fr(5.5, 5, 1) = 0.656933
obr(y, a, b) := root(fr(t, a, b) - y, t, 0, 10)
obr(0.657, 5, 1) = 5.50018
X1 :=
    for i ∈ 0 .. n - 1
        x[i] ← obr(Y[i], 5, 1)
    return x
X2 := sort(X1)
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bin := 40
lower := floor(min(X1))
upper := ceil(max(X1))
h := (upper - lower)/bin
j := 1 .. bin + 1
int[j] := lower + h*j
t := hist(int, X1)/(n*h)
int := int + h/2
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M2 := sum(X1[i], i = 0 .. n - 1)/n = 5.11689
D2 := sum(X1[i]^2, i = 0 .. n - 1)/n - (sum(X1[i], i = 0 .. n - 1)/n)^2 = 1.01551
M1 = 5.10107
D1 = 0.979089
M2 = 5.11689
D2 = 1.01551
