n := 16
Kjm := 10^-2
E0 := 20
t := sort(runif(n, n, n*n)) = [18.2609; 73.2987; 95.8463; 113.877; 128.931; 131.813; 158.565; 181.427; 182.088; 182.716; 184.069; 193.505; 197.304; 201.761; 208.691; 231.144]
Given
sum(1/Kjm - (E0 - (i - 1))*t[i], i = 0 .. n - 1) == 0
sum(1/(E0 - (i - 1)) - Kjm*t[i], i = 0 .. n - 1) == 0
a := Find(Kjm, E0) = [0.00628907; 9.06591]
Kjm := a[0] = 0.00628907
E0 := ceil(a[1]) = 10
i := 0, 1 .. E0
λ(i) := Kjm*(E0 - (i - 1))
m(i) := 1/λ(i)
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P(i) := e^(-λ(i)*t[i])
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f(i) := λ(i)*e^(-λ(i)*t[i])
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