n := 16
Kjm := 5*10^-1
E0 := 20
t := sort(runif(n, n, n*n)) = [16.3044; 18.1414; 37.9387; 44.5791; 51.3552; 55.8999; 57.791; 62.3975; 88.9567; 100.074; 143.599; 156.401; 160.423; 186.519; 213.481; 253.242]
Given
sum(1/Kjm - (E0 - (i - 1))*t[i], i = 0 .. n - 1) == 0
sum(1/(E0 - (i - 1)) - Kjm*t[i], i = 0 .. n - 1) == 0
a := Find(Kjm, E0) = [3.88569e-5; 259.56]
Kjm := a[0] = 3.88569e-5
E0 := floor(a[1]) = 259
i := 0, 1 .. E0
λ(i) := Kjm*(E0 - (i - 1))
λ(3) = 0.00998623
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m(i) := 1/λ(i)
m(250) = 2573.54
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i := 0, 1 .. n
P(i) := e^(-λ(i)*t[i])
P(7) = 0.541497
f(i) := λ(i)*e^(-λ(i)*t[i])
f(7) = 0.00532335
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